# При расчет использовалисмь следующие статьи: Why use a Gate Drive Transformer (TE), A Guide to Designing Gate-Drive Transformers, Fundamentals of MOSFET and IGBT Gate Driver Circuits(TE)
# Дано:
V_drv := 15  # V
f := 150*10^3
D := 0.5
# Транзистор IRFB18N
# Будем использовать трансфоматор с соотношением витков 1:1
# 1) Определим ток для включения тразистора за 100 ns
Q_g := 120*10^-9
t_tr_on := 100*10^-9
I_g := Q_g/t_tr_on = 1.2
# 2) Определим сопроитвление в цепи завтора
V_D := 0.7
V_th := 5
R_g := (V_drv - V_D - V_th)/I_g = 7.75
R_g := 8
# 3) Определим минимальную намагничивания трансформатора
L_mag := 10*D/f*R_g = 0.000266667
# По рекомендации Lmag надо обратся от 0,5 до 2 мГн при частоте от 100 до 300 кГц
L_mag := 1*10^-3
# Выберем сердечник B64290-L45-X38
# Материал: Т38
A_L := 6440*10^-9
ΔB := 0.3
A_e := 0.1973
# 4) Расчитаем число витков
N_p := V_drv*D/f*10^4/(ΔB*A_e) = 8.44737
N_p := 9
N_s := N_p = 9
# Рассчитаем диаметр провода
ε := 6.67/sqrt(100000)*10 = 0.210924  # мм
d_mix := 2*ε = 0.421848  # мм
# Выберем провод AWG 26
d := 0.405  # мм
S_d := 0.13  # мм2
# 5) Определим коэффициент заполенния сердечника
# Площадь внутринее радицса сердечника 72.3 мм2
K_u := S_d*(N_p + N_s*2)/72.3 = 0.0485477
# 6) Расчитаем индуктивно
L := A_L*N_p^2 = 0.00052164
# Выберем сердечник B64290-L38-X38
# Материал: Т38
A_L := 4090*10^-9
ΔB := 0.3
A_e := 0.0783
# 4) Расчитаем число витков
N_p := V_drv*D/f*10^4/(ΔB*A_e) = 21.2857
N_p := 21
N_s := N_p = 21
# Выберем провод AWG 26
d := 0.405  # мм
S_d := 0.13  # мм2
# 5) Определим коэффициент заполенния сердечника
# Площадь внутринее радицса сердечника 28.3 мм2
K_u := S_d*(N_p + N_s*2)/28.3 = 0.289399
# 6) Расчитаем индуктивно
L := A_L*N_p^2 = 0.00180369
# 6) Расчитаем сопротивление провода
ρ_d := 134*10^-6
MLT := 6/2*π = 9.42478  # Средня длина витка сердечника (мм)
R_p := ρ_d*MLT/S_d*N_p = 0.20401
# 7) Рассчитаем длинну провода
MLT*N_p = 197.92  # мм
