V_in_nom := 310
V_F := 0.7
j := sqrt(-1)
V_in_min := 290
V_in_max := 330
P_out := 500
V_out := 24
I_out := 20.8
η := 0.92
M_g_nom := 1
# 1) Коэффициент трансформации
n := M_g_nom*V_in_nom/(2*V_out) = 6.45833
n := 7
# 2) Определение Mg_min, Mg_max
M_g_min := n*(V_out + V_F)*2/V_in_max = 1.04788
V_loss := P_out/η*(1 - η)/I_out = 2.0903
M_g_max := n*(V_out + V_F + V_loss)*2/V_in_min = 1.29332
# С учетом тока перегрузки в 110%
M_g_max := M_g_max*1.1 = 1.42266
# 3) Определим Ln и Qe
Mg(f_n, L_n, Q_e) := |L_n*f_n^2/(((L_n + 1)*f_n^2 - 1) + j*((f_n^2 - 1)*f_n*Q_e*L_n))|
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# Примем:
L_n := 5
Q_e := 0.45
# 4) Расчитаем эквивалентное сопротивление
R_e_nom := 8*n^2/π^2*V_out/I_out = 45.8284
R_e_max := 8*n^2/π^2*V_out/(I_out*1.1) = 41.6621
# 5) Расчет параметров резонансной схемы
f_0 := 130*10^3
C_r := 1/(2*π*Q_e*f_0*R_e_nom) = 5.93649e-8
C_r := 75*10^-9
L_r := 1/((2*π*f_0)^2*C_r) = 1.99845e-5
L_r := 20*10^-6
L_m := L_n*L_r = 0.0001
# 6) Проверка резонансной схемы
f_0_nom := 1/(2*π*sqrt(L_r*C_r)) = 129949
Q_c_nom := sqrt(L_r/C_r)/R_e_nom = 0.356328
Q_c_max := sqrt(L_r/C_r)/R_e_max = 0.391961
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f_min := f_0_nom*0.55 = 71472.2
f_max := f_0_nom*0.93 = 120853
# Полученные значения находятся в заданном диапозоне частот
# 7) Определение токов первичной обмотки
I_oe := π/(2*sqrt(2))*I_out*1.1/n = 3.63047  # действующий ток в первичной обмотки
I_m := 2*sqrt(2)/π*n*V_out/(2*π*f_min*L_m) = 3.36812  # действующий ток намагничивания
I_r := sqrt(I_oe^2 + I_m^2) = 4.95223  # ток резонансного контура
# 8) Определение тока вторичной обмотки
I_oe_s := n*I_oe = 25.4133
I_sw := sqrt(2)*I_oe_s/2 = 17.9699
I_sw_avg := sqrt(2)*I_oe_s/π = 11.44
# 9) Определение требуемого диаметра провода с учетом скин эффекта
ε_d := 6.62/sqrt(f_0_nom) = 0.0183641
d_w_max := 2*ε_d = 0.0367283  # cm
A_w_max := π*d_w_max^2/4 = 0.00105948  # cm2
# В качестве провода будем использовать ЛЭП с диаметром провода 0.01 cm.
d_w_lep := 0.01  # cm
A_w_lep := π*d_w_lep^2/4 = 7.85398e-5  # cm2
# 10) Выбор трансформатора
# 1) Расчет габаритной мощности
P_trans2 := I_sw_avg*(V_out + V_F) = 282.568
P_trans1 := I_m*V_in_nom*4/(2*π*sqrt(2)) = 470.018
P_trans := 1/2*(P_trans1 + 2*P_trans2) = 517.577
# 2) Определим минимальные размеры магнитопровода
K_f := 4  # для прямоугольеого сигнала
K_u := 0.4  # коэффициент заполенния окна сердечника
J_w := 5  # A/mm2
B_m := 0.25
A_p := 10^4*P_trans/(K_f*K_u*B_m*J_w*f_0_nom*100) = 0.199145
# Выберем ETD-44
# Тип сердечника | ETD - 44
# Материал | N87
# 3) Расчет площади сечения  проводника и количества жил в проводе
A_pw := I_m/J_w = 0.673624  # mm2
S_w := A_pw/(A_w_lep*100) = 85.7684  # Один провод должег состоять из Sw элементарных проводников
# Выберем ЛЭП с числом жил 300
N_n_lep := 300
# 4) Определим необходимое число витков чтобы получить Lm
# Пусть Np=14
# Для этого воспользуемся Ferrite Magnetic Design Tool от TDK и определим необходимый зазор чтобы получить желаемое количество витков
A_L := 156.9*10^-9  # при зазоре 0,55 мм
N_p := sqrt(L_m/A_L) = 25.2458
N_p := 14
# 5) Рассчитаем максимальную индукцию в сердечнике
A_e := 173  # mm2  # Эффективное магнитное сечение
B_max := L_m*I_m*sqrt(2)/(N_p*A_e*10^-6) = 0.196666
# Bmax < 0.25
# 6) Рассчитаем число витков во вторичной обмотке
N_s := N_p/n = 2
# 7) Расчет площади сечения  проводника и количества жил в проводе для вторичных силовых обмоток
A_sw := I_sw_avg/J_w = 2.288  # mm2
S_sw := A_sw/(A_w_lep*100) = 291.317  # Один провод должег состоять из Sw элементарных проводников
# Выберем ЛЭП с числом жил 300 и диаметром 0.1 мм
# 8) Расчет площади поперечного сечения дополнительной обмотки
P_vc := 5
V_vc := 15  # Будем стабилизировать. С доп. оботки изначально будет приходит 24 В
I_vc := P_vc/V_vc = 0.333333
A_vc_w := I_vc/J_w = 0.0666667  # mm2
S_vc := A_vc_w/(A_w_lep*100) = 8.48826  # Один провод должег состоять из Sw элементарных проводников
# Выберем ЛЭП с числом жил 105 диаметр 0.1 мм
# 8) Определм коэффициент заполенния обмотки
# Всего проводников:
N_t := N_p + N_s*2 + N_s = 20
K_u := (N_p*300*A_w_lep + N_s*2*300*A_w_lep + N_s*300*A_w_lep)/(275*0.01) = 0.17136
# Выберем ETD-39
# Тип сердечника | ETD - 39
# Материал | N87
# Средняя длинна витка
MLT := 83  # мм
# Площадь поверхности транформатора
A_t := 69.9  # см2
# 1) Определим необходимое число витков чтобы получить Lm
# Пусть Np=21
# Для этого воспользуемся Ferrite Magnetic Design Tool от TDK и определим необходимый зазор чтобы получить желаемое количество витков
A_L := 230*10^-9  # при зазоре 0,85 мм
N_p := sqrt(L_m/A_L) = 20.8514
N_p := 21
N_s := 3
# 2) Рассчитаем максимальную индукцию в сердечнике
A_e := 125  # mm2  # Эффективное магнитное сечение
B_max := L_m*I_m*sqrt(2)/(N_p*A_e*10^-6) = 0.181457
# 3) Определм коэффициент заполенния обмотки
# Всего проводников:
N_t := N_p + N_s*2 + N_s = 30
K_u := (N_p*300*A_w_lep + N_s*2*300*A_w_lep + N_s*300*A_w_lep)/(234*0.01) = 0.302076
# Выберем магнитопровод ETD-39
# 4) Расчитаем потери в проводе трансформатора
# 1. Первичная обмотка
ρ_cu := 0.0175*10^-3  # ом*мм2\мм
R_p := MLT*ρ_cu/(A_w_lep*100*300)*N_p = 0.0129457
R_s := MLT*ρ_cu/(A_w_lep*100*300)*N_s*2 = 0.00369876
# В магнито проводе будет выделятся потерь примерно 1.334 Вт. По программе TDK
P_trans_loss := R_p*I_m^2 + I_sw_avg*R_s + 1.334 = 1.52317  # Вт
# 5) Расчет перегрева трансформватора
# Мощность приходящаяся на единицу поверхности транссформатора
Ψ := P_trans_loss/A_t = 0.0217907  # Вт/см2
T_trans := 450*Ψ^0.826 = 19.0821  # С
# 11) Выбор резонансного конденсатора Cr
C_r = 7.5e-8
I_r = 4.95223
V_cr := I_r/(2*π*f_min*C_r) = 147.035
# Действующее напряжение
V_cr_RMS := sqrt((V_in_max/2)^2 + V_cr^2) = 221.008
# Пиковое значение напряжения
V_vt_peak := (V_in_max/2) + V_cr*sqrt(2) = 372.94
# Возьмем конденсаторы на 0.15 мкФ, 0.056 мкФ и включим их последовательно паралельно
# 12) Выбор транзисторов (IRFB18N50KPBF)
# Расчитаем потери в транзисторе:
R_DS := 0.29  # Ом
P_tr := I_r^2*R_DS = 7.11211  # Вт
# Расчет мертвого для достижения коммутации при нулевом напряжении
# Расчет проводим для транзисторов IRFB18N50
# Эффективная выходная емкость транзистора
C_out_eff := 155*10^-12
I_m_min := 0.901*n*V_out/(2*π*f_0_nom*L_m) = 1.85387  # А
1/2*(L_m + L_r)*(sqrt(2)*I_m_min)^2 = 0.000412421
1/2*(2*C_out_eff)*V_in_max^2 = 1.68795e-5
t_dead := 16*C_out_eff*f_0_nom*L_m = 3.22275e-8
# Зададимся tdead=150 нс
# 13) Выбор выходных диодов
V_DB := V_in_max/2/n*2 = 47.1429
I_sav := sqrt(2)*I_sw/π = 8.0893
# Выберем STPS30150CT 150В 30 А ср. ток
# Расчитаем потери на диоде
P_VD := 0.92*I_sav = 7.44216
# 14) Выбор выходного конденсатора
# Пусть максимальные пульсации на выходе выпрямителя будут 120 мВ, тогда максимальное сопротивление конденсаторов будет равно
V_o_pk_pk := 0.12
ESR_max := V_o_pk_pk/((π/4*I_out)*2) = 0.00367281
# Определим ток пульсаций конденсатора при 100 кГц
I_C0 := sqrt((π/(2*sqrt(2))*I_out)^2 - I_out^2) = 10.0553  # A
# Будем использовать 8 конденсаторов марки A759KS396M1HAAE042
4/π*n*330*|(j*f_min*L_n*Q_e + 1)/(f_min^2*L_n)| = 0.0185181
# 15) Расчитаем катушку рассъеянья
# Выберем ETD-39
# Тип сердечника | ETD - 34
# Материал | N87
# Средняя длинна витка
MLT := 71  # мм
# Площадь поверхности транформатора
A_t := 53.4  # см2
# 1) Определим необходимое число витков чтобы получить Lm
# Пусть Np=21
# Для этого воспользуемся Ferrite Magnetic Design Tool от TDK и определим необходимый зазор чтобы получить желаемое количество витков
A_L := 153*10^-9  # при зазоре 1 мм
N_p := sqrt(L_m/A_L) = 25.5655
N_p := 26
# 2) Рассчитаем максимальную индукцию в сердечнике
A_e := 97.1  # mm2  # Эффективное магнитное сечение
B_max := L_m*I_m*sqrt(2)/(N_p*A_e*10^-6) = 0.188673
# 3) Определм коэффициент заполенния обмотки
# Всего проводников:
N_t := N_p = 26
K_u := N_p*300*A_w_lep/(171*0.01) = 0.358252
# Выберем магнитопровод ETD-39
# 4) Расчитаем потери в проводе трансформатора
# 1. Первичная обмотка
ρ_cu := 0.0175*10^-3  # ом*мм2\мм
R_p := MLT*ρ_cu/(A_w_lep*100*300)*N_p = 0.0137107
R_s := MLT*ρ_cu/(A_w_lep*100*300)*N_s*2 = 0.003164
# В магнито проводе будет выделятся потерь примерно 1.334 Вт. По программе TDK
P_trans_loss := R_p*I_m^2 + 1.334 = 1.48954  # Вт
# 5) Расчет перегрева трансформватора
# Мощность приходящаяся на единицу поверхности транссформатора
Ψ := P_trans_loss/A_t = 0.0278939  # Вт/см2
T_trans := 450*Ψ^0.826 = 23.3993  # С
# 15) Расчитаем катушку рассъеянья
# Выберем ETD34
# Тип сердечника | ETD34
# Материал | N87
# Средняя длинна витка
MLT := 71  # мм
# Площадь поверхности транформатора
A_t := 53.4  # см2
# 1) Определим необходимое число витков чтобы получить Lm
# Для этого воспользуемся Ferrite Magnetic Design Tool от TDK и определим необходимый зазор чтобы получить желаемое количество витков
A_L := 153*10^-9  # Зазор 0,5
N_p := sqrt(L_m/A_L) = 25.5655
N_p := 26
# 2) Рассчитаем максимальную индукцию в сердечнике
A_e := 97  # mm2  # Эффективное магнитное сечение
B_max := L_m*I_m*sqrt(2)/(N_p*A_e*10^-6) = 0.188868
# 3) Определм коэффициент заполенния обмотки
# Всего проводников:
N_t := N_p = 26
K_u := N_p*300*A_w_lep/(122*0.01) = 0.50214
# Выберем магнитопровод ETD-34
# 4) Расчитаем потери в проводе трансформатора
# 1. Первичная обмотка
ρ_cu := 0.0175*10^-3  # ом*мм2\мм
R_p := MLT*ρ_cu/(A_w_lep*100*300)*N_p = 0.0137107
R_s := MLT*ρ_cu/(A_w_lep*100*300)*N_s*2 = 0.003164
# В магнито проводе будет выделятся потерь примерно 1.334 Вт. По программе TDK
P_trans_loss := R_p*I_m^2 + 1.334 = 1.48954  # Вт
# 5) Расчет перегрева трансформватора
# Мощность приходящаяся на единицу поверхности транссформатора
Ψ := P_trans_loss/A_t = 0.0278939  # Вт/см2
T_trans := 450*Ψ^0.826 = 23.3993  # С
